# OpenSim document version 40000
InverseKinematicsTool:
  results_directory: ./
  constraint_weight: Inf
  accuracy: 1e-5
  time_range: 0 1
  report_errors: true
  report_marker_locations: false
  IKTaskSet:
    # HEAD: low weight (less reliable from video)
    IKMarkerTask head: apply=true weight=0.5
    IKMarkerTask lfronthead: apply=true weight=0.5
    IKMarkerTask rfronthead: apply=true weight=0.5
    IKMarkerTask lbackhead: apply=true weight=0.5
    IKMarkerTask rbackhead: apply=true weight=0.5
    IKMarkerTask lcheek: apply=true weight=0.2
    IKMarkerTask rcheek: apply=true weight=0.2
    # TORSO: medium weight
    IKMarkerTask backneck: apply=true weight=5
    IKMarkerTask upperback: apply=true weight=3
    IKMarkerTask clavicle: apply=true weight=3
    IKMarkerTask sternum: apply=true weight=1
    IKMarkerTask umbilicus: apply=true weight=1
    IKMarkerTask lback: apply=true weight=2
    IKMarkerTask rback: apply=true weight=2
    IKMarkerTask lscapula: apply=true weight=2
    IKMarkerTask rscapula: apply=true weight=2
    IKMarkerTask lbreast: apply=true weight=1
    IKMarkerTask rbreast: apply=true weight=1
    IKMarkerTask thor: apply=true weight=3
    # PELVIS: high weight (anchors the model)
    IKMarkerTask lasis: apply=true weight=25
    IKMarkerTask rasis: apply=true weight=25
    IKMarkerTask lpsis: apply=true weight=25
    IKMarkerTask rpsis: apply=true weight=25
    IKMarkerTask mhip: apply=true weight=10
    IKMarkerTask pelv: apply=true weight=5
    IKMarkerTask lhip: apply=true weight=25
    IKMarkerTask rhip: apply=true weight=25
    IKMarkerTask lwaist: apply=true weight=2
    IKMarkerTask rwaist: apply=true weight=2
    IKMarkerTask lbum: apply=true weight=2
    IKMarkerTask rbum: apply=true weight=2
    # LEFT ARM
    IKMarkerTask lshom: apply=true weight=5
    IKMarkerTask lsho: apply=true weight=5
    IKMarkerTask lupperarm: apply=true weight=4
    IKMarkerTask lelbm: apply=true weight=5
    IKMarkerTask lelbinner: apply=true weight=5
    IKMarkerTask lelb: apply=true weight=5
    IKMarkerTask lforearm: apply=true weight=4
    IKMarkerTask lwrithumbside: apply=true weight=5
    IKMarkerTask lwripinkieside: apply=true weight=5
    IKMarkerTask lwri: apply=true weight=5
    # RIGHT ARM
    IKMarkerTask rshom: apply=true weight=5
    IKMarkerTask rsho: apply=true weight=5
    IKMarkerTask rupperarm: apply=true weight=4
    IKMarkerTask relbm: apply=true weight=5
    IKMarkerTask relbinner: apply=true weight=5
    IKMarkerTask relb: apply=true weight=5
    IKMarkerTask rforearm: apply=true weight=4
    IKMarkerTask rwrithumbside: apply=true weight=5
    IKMarkerTask rwripinkieside: apply=true weight=5
    IKMarkerTask rwri: apply=true weight=5
    # HANDS: low weight
    IKMarkerTask lfin: apply=true weight=1
    IKMarkerTask lthumb: apply=true weight=1
    IKMarkerTask lhan: apply=true weight=1
    IKMarkerTask rfin: apply=true weight=1
    IKMarkerTask rthumb: apply=true weight=1
    IKMarkerTask rhan: apply=true weight=1
    # LEFT LEG: high weight (critical for gait)
    IKMarkerTask lfrontthigh: apply=true weight=4
    IKMarkerTask lthigh: apply=true weight=4
    IKMarkerTask lfrontinnerthigh: apply=true weight=4
    IKMarkerTask lknem: apply=true weight=30
    IKMarkerTask linnerknee: apply=true weight=30
    IKMarkerTask lkne: apply=true weight=30
    IKMarkerTask lshin: apply=true weight=4
    IKMarkerTask lankm: apply=true weight=30
    IKMarkerTask lank: apply=true weight=30
    # RIGHT LEG
    IKMarkerTask rfrontthigh: apply=true weight=4
    IKMarkerTask rthigh: apply=true weight=4
    IKMarkerTask rfrontinnerthigh: apply=true weight=4
    IKMarkerTask rknem: apply=true weight=30
    IKMarkerTask rinnerknee: apply=true weight=30
    IKMarkerTask rkne: apply=true weight=30
    IKMarkerTask rshin: apply=true weight=4
    IKMarkerTask rankm: apply=true weight=30
    IKMarkerTask rank: apply=true weight=30
    # LEFT FOOT: high weight
    IKMarkerTask lhee: apply=true weight=60
    IKMarkerTask lfifthmetatarsal: apply=true weight=30
    IKMarkerTask ltoe: apply=true weight=30
    IKMarkerTask lfirstmetatarsal: apply=true weight=30
    IKMarkerTask lfourthtoe: apply=true weight=10
    IKMarkerTask lfoo: apply=true weight=15
    # RIGHT FOOT
    IKMarkerTask rhee: apply=true weight=60
    IKMarkerTask rfifthmetatarsal: apply=true weight=30
    IKMarkerTask rtoe: apply=true weight=30
    IKMarkerTask rfirstmetatarsal: apply=true weight=30
    IKMarkerTask rfourthtoe: apply=true weight=10
    IKMarkerTask rfoo: apply=true weight=15
    # COORDINATE TASK: lumbar constraint
    IKCoordinateTask L5_S1_Flex_Ext: apply=true weight=0.1 value_type=default_value value=0
